# OpenSim document version 40000
Model model-scaled-preserve-mass:
  gravity: 0 -9.80665 0
  length_units: meters
  force_units: N
  credits:
    Ajay Seth, Meilin Dong, Ricardo Matias, Scott Delp. Parameters from van der Helm and Klein-Breteler
  publications:
    Frontiers in Neurorobotics: in In Press DSEM: van der Helm 1994 Klein-Breteler et al. 1996.
  Ground
  BodySet:
    Body scapula: mass=0.5793006 [kg] mass_center=(0 0 0) inertia=(0.005793006 0.005793006 0.005793006 0 0 0)
      PhysicalOffsetFrame scapula_geom_1_offset: socket_parent=.. translation=(0 0 0) [meters] meshes=scapula.vtp
    Body humerus: mass=2.872846 mass_center=(0.0257029 -0.1390961 -0.01538209)
        inertia=(0.02278772 0.004737979 0.02278772 -0.0006452074 -0.0004318228 0.0002282533) meshes=humerus.vtp
    Body ulna: mass=1.410076 mass_center=(0.01148218 -0.1133685 0.02869953)
        inertia=(0.0096404 0.00205346 0.008803343 0.0005643899 -0.000135621 0.001944821) meshes=ulna.vtp
    Body radius: mass=0.2980131 mass_center=(0.03973509 -0.2145198 0.01843198)
        inertia=(0.0007811342 0.0001577763 7.170192e-5 5.367849e-5 -7.55132e-6 0.0001143028) meshes=radius.vtp
    Body hand: mass=0.669764 mass_center=(0.0007089221 -0.1069291 -0.0431261)
        inertia=(0.001137507 0.000339097 0.001137507 0 0 0)
  JointSet:
    WeldJoint scapula_to_ground: socket_parent_frame=ground_offset socket_child_frame=scapula_offset
      PhysicalOffsetFrame ground_offset: socket_parent=/ground translation=(0 0 0)
      PhysicalOffsetFrame scapula_offset: socket_parent=/bodyset/scapula translation=(0 0 0)
    CustomJoint GlenoHumeral: socket_parent_frame=scapula_offset socket_child_frame=humerus_offset
      Coordinate plane_elv: default_value=-0.4945914 range=(-1.5 3.141593) clamped=false
      Coordinate shoulder_elv: default_value=0.02319543 range=(-0.78 2.53) clamped=false
      Coordinate axial_rot: default_value=0.6425779 range=(-1.570795 1.570795) clamped=false
      PhysicalOffsetFrame scapula_offset: socket_parent=/bodyset/scapula
          translation=(-0.008324525 -0.03277045 0.008593584)
      PhysicalOffsetFrame humerus_offset: socket_parent=/bodyset/humerus translation=(0 0 0)
      SpatialTransform: axes_held_at_zero=(translation1 translation2 translation3)
        TransformAxis rotation1: coordinates=plane_elv axis=(0 1 0) LinearFunction(coefficients=1 0)
        TransformAxis rotation2: coordinates=shoulder_elv axis=(-1 0 0) LinearFunction(coefficients=1 0)
        TransformAxis rotation3: coordinates=axial_rot axis=(-0.0846 0.9947 -0.0584) LinearFunction(coefficients=1 0)
    WeldJoint elbow: socket_parent_frame=humerus_offset socket_child_frame=ulna_offset
      PhysicalOffsetFrame humerus_offset: socket_parent=/bodyset/humerus
          translation=(0.008681498 -0.2883195 -0.01483919) orientation=(0 0 1.57) [radians]
      PhysicalOffsetFrame ulna_offset: socket_parent=/bodyset/ulna translation=(0 0 0)
    WeldJoint radioulnar: socket_parent_frame=ulna_offset socket_child_frame=radius_offset
      PhysicalOffsetFrame ulna_offset: socket_parent=/bodyset/ulna translation=(0.0004726148 -0.01359122 0.02362956)
      PhysicalOffsetFrame radius_offset: socket_parent=/bodyset/radius translation=(0 0 0)
    WeldJoint rc: socket_parent_frame=radius_offset socket_child_frame=hand_offset
      PhysicalOffsetFrame radius_offset: socket_parent=/bodyset/radius translation=(0.02126766 -0.2859319 0.02953842)
      PhysicalOffsetFrame hand_offset: socket_parent=/bodyset/hand translation=(0 0 0)
  ForceSet:
    CoordinateActuator plane_elv_actuator: coordinate=plane_elv optimal_force=1
    CoordinateActuator shoulder_elv_actuator: coordinate=shoulder_elv optimal_force=1
